Simulations: Version=195
  Memo
    Simulation of silvopastoral nelder soil and pasture sampling sites at Ballantrae and Poukawa.

    Set up as a tree density x site experiment

    Tree densities are no trees, low stems/ha, hig stems/ha
    Factors that change include radiation, temperature, rainfall and litter input
    Each tree density has a different species composition : No (PR+WC), Low (PR+WC), High (PR+BT)

    Each site has its own weather and soil profile.

    All experimental units are cut in a simple rotation determined by growth.
  DataStore
  Experiment SlopeXAspect
    Factors
      Permutation
        Factor SitexSoil
          CompositeFactor No_sph: Specifications=[Manage species present]
            Manager Manage species present
              TheSpecies = AGPBrownTop
```csharp
using APSIM.Shared.Utilities;
using Models.Utilities;
using Models.Soils;
using Models.PMF;
using Models.Core;
using System;
using System.Linq;
using System.Collections.Generic;

namespace Models
{
    [Serializable] 
    public class Script : Model
    {
        
        [Link] Clock clock;
        [Link] private IPlant[] plants;

        [Separator("This manager removes one or more species from the simulation using an 'EndCrop' command on the first day of the simulation")]

        [Description("Species to remove from the simulation. Comma delimited, case matters, can be blank")]
        public string[] TheSpecies { get; set; }        
        
        [EventSubscribe("DoManagement")]
        private void OnDoManagement(object sender, EventArgs e)
        {
            if (clock.Today == clock.StartDate)
				foreach (var plant in plants)
              		if (TheSpecies != null && TheSpecies.Length > 0 && TheSpecies.Contains(plant.Name))
                		plant.EndCrop();
        }
    }
}
```
          CompositeFactor Low_sph: Specifications=[Manage species present]
            Manager Manage species present
              TheSpecies = AGRyegrass
              script: same as in SlopeXAspect.Factors.Permutation.SitexSoil.No_sph.Manage species present
          CompositeFactor High_sph: Specifications=[Manage species present]
            Manager Manage species present
              TheSpecies = AGPRyegrass, AGPWhiteClover
              script: same as in SlopeXAspect.Factors.Permutation.SitexSoil.No_sph.Manage species present
        Factor Site
          CompositeFactor Ballantrae
            Specifications:
              [Weather]
              [Soil]
            Weather: FileName=Ballantrae1972-2024.met
            Soil: LocalName=Matamau Silt Loam; Site=Ballantrae; NearestTown=Woodville; Region=Hawke's Bay; Country=New Zealand; NaturalVegetation=Forest; Latitude=-40.325; Longitude=175.825; LocationAccuracy=5 km; DataSource=Alec Mackay
              Physical
                Thickness  ParticleSizeSand  ParticleSizeSilt  ParticleSizeClay  Rocks  BD    AirDry  LL15   DUL    SAT    KS
                50         21                50                29                0      0.92  0.055   0.167  0.446  0.576  11984
                80         17                58                25                0      1.12  0.057   0.173  0.438  0.523  3618
                200        16                60                24                0      1.27  0.06    0.181  0.432  0.481  514
                120        15                60                25                0      1.32  0.06    0.179  0.406  0.467  353
                170        15                60                25                0      1.45  0.06    0.182  0.396  0.45   233
                380        15                60                25                0      1.45  0.06    0.182  0.396  0.45   233
                SoilCrop AGPRyegrassSoil: LL=[0.177, 0.183, 0.191, 0.189, 0.192, 0.192]; KL=[0.06, 0.06, 0.06, 0.06, 0, 0]; XF=[1, 1, 1, 1, 0, 0]
                SoilCrop AGPWhiteCloverSoil: LL=[0.197, 0.203, 0.211, 0.209, 0.212, 0.212]; KL=[0.06, 0.06, 0, 0, 0, 0]; XF=[1, 1, 0, 0, 0, 0]
                SoilCrop AGPBrownTopSoil: LL=[0.167, 0.173, 0.181, 0.179, 0.182, 0.182]; KL=[0.06, 0.06, 0.06, 0.06, 0, 0]; XF=[1, 1, 1, 1, 0, 0]
              WaterBalance SoilWater: SummerDate=1-Nov; SummerU=9.12; SummerCona=3; WinterDate=1-Apr; WinterU=9.12; WinterCona=3; DiffusConst=0; DiffusSlope=0; Salb=0.13; CN2Bare=73; CNRed=20; CNCov=0.8; PSIDul=-100; Thickness=[50, 80, 200, 120, 170, 380, 999999, 999999]; SWCON=[0.4, 0.4, 0.6, 0.6, 0.7, 0.7, -, -]
              Organic: FOMCNRatio=10; CarbonUnits=Total
                Thickness  Carbon  SoilCNRatio  FBiom  FInert  FOM
                50         5       11           0.08   0.45    36
                80         2       11           0.07   0.34    31
                200        1       11           0.02   0.51    21
                120        0.5     11           0.02   0.87    15
                170        0.2     11           0.01   0.96    2
                380        0.1     11           0.01   0.96    2
              Chemical: PHUnits=Water
                Thickness  PH   CEC
                50         6.5  20.4
                80         6.5  12.314
                200        6.5  9.73
                120        6.5  8.805
                170        6.5  8.13
                380        6.5  7.905
                CEC source: Calculated
              Water: Thickness=[50, 80, 200, 120, 170, 380]; InitialValues=[0.399, 0.335, 0.308, 0.268, 0.198, 0.198]; InitialPAWmm=69.44; RelativeTo=LL15; FilledFromTop=true
              Solute NO3: Thickness=[50, 80, 200, 120, 170, 380]; InitialValues=[15, 15, 7, 7, 4, 4]; InitialValuesUnits=ppm; WaterTableConcentration=0; D0=0; DepthConstant=0; MaxDepthSoluteAccessible=0; RunoffEffectivenessAtMovingSolute=0; MaxEffectiveRunoff=0
              Solute NH4: Thickness=[50, 80, 200, 120, 170, 380]; InitialValues=[1, 1, 0.5, 0.5, 0.3, 0.3]; InitialValuesUnits=ppm; WaterTableConcentration=0; D0=0; DepthConstant=0; MaxDepthSoluteAccessible=0; RunoffEffectivenessAtMovingSolute=0; MaxEffectiveRunoff=0
              Solute Urea: Thickness=[50, 80, 200, 120, 170, 380]; InitialValues=[0, 0, 0, 0, 0, 0]; InitialValuesUnits=kg/ha; WaterTableConcentration=0; D0=0; DepthConstant=0; MaxDepthSoluteAccessible=0; RunoffEffectivenessAtMovingSolute=0; MaxEffectiveRunoff=0
              Nutrient
              SoilTemperature Temperature
          CompositeFactor Poukawa
            Specifications:
              [Weather]
              [Soil]
            Weather
              FileName=C:/Users/doddm/OneDrive - AgResearch/Documents/Apps/APSIM/Met files/Poukawa1972-2022_VCS.met
            Soil: SoilType=Silt loam; LocalName=Okawa series; Site=Matapiro Silt Loam; Region=Hawkes Bay; Country=New Zealand; NaturalVegetation=long term grass; Latitude=-39.74652; Longitude=176.73435; LocationAccuracy=+/-50 m
              Comments=Mike Dodd construct for Poukawa from S-Map and Soils of the Ruitaniwha Plains by E Griffiths
              Physical
                Thickness  ParticleSizeSand  ParticleSizeSilt  ParticleSizeClay  Rocks  BD    AirDry  LL15   DUL    SAT    KS
                200        20                60                20                0      1.18  0.071   0.24   0.46   0.514  72
                100        15                55                30                0      1.22  0.078   0.236  0.437  0.483  72
                300        15                45                40                0      1.35  0.076   0.229  0.411  0.43   24
                300        5                 25                20                50     1.53  0.04    0.12   0.17   0.2    5
                300        5                 25                10                60     1.53  0.04    0.12   0.17   0.2    5
                BD source: Field measured and checked for sensibility
                SoilCrop AGPBrowntopSoil: LL=[0.215, 0.236, 0.229, 0.12, 0.12]; KL=[0.06, 0.06, 0.06, 0, 0]; XF=[1, 1, 1, 1, 0]
                SoilCrop AGPRyegrassSoil: LL=[0.215, 0.236, 0.229, 0.12, 0.12]; KL=[0.06, 0.06, 0.06, 0, 0]; XF=[1, 1, 1, 0, 0]
                SoilCrop AGPWhiteCloverSoil: LL=[0.235, 0.256, 0.249, 0.12, 0.12]; KL=[0.06, 0.06, 0.06, 0, 0]; XF=[1, 1, 0, 0, 0]
              WaterBalance SoilWater: SummerDate=1-nov; SummerU=6; SummerCona=3.5; WinterDate=1-apr; WinterU=2; WinterCona=2; DiffusConst=88; DiffusSlope=35; Salb=0.13; CN2Bare=73; CNRed=20; CNCov=0.8; PSIDul=-100; Thickness=[200, 100, 300, 300, 300]; SWCON=[0.654, 0.569, 0.605, 0.491, 0.47]
              Organic: FOMCNRatio=40; CarbonUnits=Total
                Thickness  Carbon  SoilCNRatio  FBiom  FInert  FOM
                200        4.9     10           0.075  0.585   121.289
                100        1.6     12.813       0.014  0.766   82.945
                300        0.8     12.813       0.008  0.91    60.23
                300        0.4     12.813       0.008  0.956   26.527
                300        0.3     12.813       0.008  0.991   9.009
              Chemical: PHUnits=Water
                Thickness  PH   CEC
                200        6    17.705
                100        6.5  12.615
                300        6.5  13.485
                300        6.5  6.575
                300        6.5  3.68
                CEC source: Calculated
                PH source: Estimated based on local knowledge
              Nutrient
              Solute NO3: InitialValuesUnits=ppm; WaterTableConcentration=0; D0=0; DepthConstant=0; MaxDepthSoluteAccessible=0; RunoffEffectivenessAtMovingSolute=0; MaxEffectiveRunoff=0
              Solute NH4: InitialValuesUnits=ppm; WaterTableConcentration=0; D0=0; DepthConstant=0; MaxDepthSoluteAccessible=0; RunoffEffectivenessAtMovingSolute=0; MaxEffectiveRunoff=0
              Solute Urea: Thickness=[200, 100, 300, 300, 300]; InitialValues=[0, 0, 0, 0, 0]; InitialValuesUnits=kg/ha; WaterTableConcentration=0; D0=0; DepthConstant=0; MaxDepthSoluteAccessible=0; RunoffEffectivenessAtMovingSolute=0; MaxEffectiveRunoff=0
              Water: Thickness=[200, 100, 300, 300, 300]; InitialValues=[0.4, 0.4, 0.35, 0.17, 0.17]; InitialPAWmm=114.7; RelativeTo=LL15; FilledFromTop=false
              SoilTemperature
              CERESSoilTemperature Temperature
    Simulation Nelder
      SoilArbitrator
      Weather: FileName=Ballantrae1972-2024.met
      MicroClimate: a_interception=0; b_interception=0; c_interception=0; d_interception=0; SoilHeatFluxFraction=0; MinimumHeightDiffForNewLayer=0; NightInterceptionFraction=0; ReferenceHeight=2
      Clock: Start=2012-07-01; End=2022-06-30
      Summary summaryfile
      Forages
        Parameters:
          Name                          LiveDigestibility  DeadDigestibility  LiveFractionConsumable  DeadFractionConsumable  LiveMinimumBiomass  DeadMinimumBiomass
          SurfaceOrganicMatter.Residue  0.7                0.3                0                       0                       100                 0
          AGPRyegrass.Leaf              FromModel          FromModel          1                       1                       100                 0
          AGPRyegrass.Stem              FromModel          FromModel          1                       1                       100                 0
          AGPRyegrass.Stolon            FromModel          FromModel          1                       1                       100                 0
          AGPWhiteClover.Leaf           FromModel          FromModel          1                       1                       100                 0
          AGPWhiteClover.Stem           FromModel          FromModel          1                       1                       100                 0
          AGPWhiteClover.Stolon         FromModel          FromModel          1                       1                       100                 0
          AGPBrownTop.Leaf              FromModel          FromModel          1                       1                       100                 0
          AGPBrownTop.Stem              FromModel          FromModel          1                       1                       100                 0
          AGPBrownTop.Stolon            FromModel          FromModel          1                       1                       100                 0
      Zone Site: Area=1; Slope=6; AspectAngle=0; Altitude=300
        SlopeEffectsOnWeather: SurroundsAlbedo=0.2; A_diffuseRadn=-3.664; B_diffuseRadn=7.011; TurbidityCoefficient=0.95; a_ki=0.98; b_ki=0.00146; c_ki=0.075; d_ki=0.4; a_pw=2.1; b_pw=0.14; aT0=1.61; bT=0.88; cT=0.12; FN=0.81; FM=0.5; RainMeasured=-0.1; WindSpeedMeasured=-0.1; VPMeasured=-0.1
          zero: FracRadnDirect, dRain, dWind, dVapPressure, RadnMeasured, RadnDirect, RadnDiffuse, RadnReflected, ExtraterrestrialRadn, MaxDirSunlightLength, ActualDirSunlightLength, ClearnessIndex, DiffuseRadnFraction, DirRadnRatio, DiffRadnRatio, FracRadnDiffuse, FracRadnReflected, TminMeasured, TmaxMeasured, dltTmin, dltTmax, AtmosphericPressure
        SimpleGrazing: GrazingRotationType=2; SimpleGrazingFrequencyString=21; SimpleMinGrazable=1600; SimpleGrazingResidual=1500; FlexibleGrazePostDM=0; FractionDefoliatedBiomassToSoil=[0.7]; FractionDefoliatedNToSoil=[0.9]; FractionExcretedNToDung=[0.35]; CNRatioDung=0; DepthUrineIsAdded=30; SendDungElsewhere=0; SendUrineElsewhere=0; UsePatching=false; PseudoPatches=true; ZoneCount=25; UrineReturnPattern=2; PseudoRandomSeed=666; FractionPopulationDecline=0; TramplingOn=true; MaximumPropLitterMovedToSoil=0.1; PastureConsumedAtMaximumRateOfLitterRemoval=1200
          PreGrazeDMArray=[2600, 2500, 2500, 2500, 2500, 2500, 2500, 2500, 2600, 2700, 2800, 2700]
          PostGrazeDMArray=[1500, 1500, 1500, 1500, 1400, 1400, 1400, 1400, 1500, 1500, 1600, 1500]
        Operations
          2015-01-31  [SimpleGrazing].GrazeToResidual(1200)
          2015-03-31  [SimpleGrazing].GrazeToResidual(1200)
          2015-05-31  [SimpleGrazing].GrazeToResidual(1200)
          2015-08-31  [SimpleGrazing].GrazeToResidual(1200)
          2015-10-30  [SimpleGrazing].GrazeToResidual(1200)
          2015-12-15  [SimpleGrazing].GrazeToResidual(1200)
          2016-01-31  [SimpleGrazing].GrazeToResidual(1200)
          2016-03-31  [SimpleGrazing].GrazeToResidual(1200)
          2016-05-31  [SimpleGrazing].GrazeToResidual(1200)
          2016-08-31  [SimpleGrazing].GrazeToResidual(1200)
          2016-10-30  [SimpleGrazing].GrazeToResidual(1200)
          2016-12-15  [SimpleGrazing].GrazeToResidual(1200)
          2017-01-31  [SimpleGrazing].GrazeToResidual(1200)
          2017-03-31  [SimpleGrazing].GrazeToResidual(1200)
          2017-05-31  [SimpleGrazing].GrazeToResidual(1200)
          2017-08-31  [SimpleGrazing].GrazeToResidual(1200)
          2017-10-30  [SimpleGrazing].GrazeToResidual(1200)
          2017-12-15  [SimpleGrazing].GrazeToResidual(1200)
          2018-01-31  [SimpleGrazing].GrazeToResidual(1200)
          2018-03-31  [SimpleGrazing].GrazeToResidual(1200)
          2018-05-31  [SimpleGrazing].GrazeToResidual(1200)
          2018-08-31  [SimpleGrazing].GrazeToResidual(1200)
          2018-10-30  [SimpleGrazing].GrazeToResidual(1200)
          2018-12-15  [SimpleGrazing].GrazeToResidual(1200)
          2019-01-31  [SimpleGrazing].GrazeToResidual(1200)
          2019-03-31  [SimpleGrazing].GrazeToResidual(1200)
          2019-05-31  [SimpleGrazing].GrazeToResidual(1200)
          2019-08-31  [SimpleGrazing].GrazeToResidual(1200)
          2019-10-30  [SimpleGrazing].GrazeToResidual(1200)
          2019-12-15  [SimpleGrazing].GrazeToResidual(1200)
          2020-04-29  [SimpleGrazing].GrazeToResidual(1200)
          2020-07-30  [SimpleGrazing].GrazeToResidual(1200)
          2020-09-22  [SimpleGrazing].GrazeToResidual(1200)
          2020-11-11  [SimpleGrazing].GrazeToResidual(1200)
          2021-01-12  [SimpleGrazing].GrazeToResidual(1200)
          2021-03-01  [SimpleGrazing].GrazeToResidual(1200)
          2021-05-25  [SimpleGrazing].GrazeToResidual(1200)
          2021-08-10  [SimpleGrazing].GrazeToResidual(1200)
          2021-10-12  [SimpleGrazing].GrazeToResidual(1200)
          2021-12-20  [SimpleGrazing].GrazeToResidual(1200)
          2022-02-24  [SimpleGrazing].GrazeToResidual(1200)
          2022-05-12  [SimpleGrazing].GrazeToResidual(1200)
          2022-08-16  [SimpleGrazing].GrazeToResidual(1200)
          2022-12-05  [SimpleGrazing].GrazeToResidual(1200)
          2023-02-20  [SimpleGrazing].GrazeToResidual(1200)
          2023-04-27  [SimpleGrazing].GrazeToResidual(1200)
          2023-07-20  [SimpleGrazing].GrazeToResidual(1200)
          2023-10-31  [SimpleGrazing].GrazeToResidual(1200)
          2024-01-18  [SimpleGrazing].GrazeToResidual(1200)
          2024-03-14  [SimpleGrazing].GrazeToResidual(1200)
        SurfaceOrganicMatter: InitialResidueName=grass; InitialResidueType=grass; InitialResidueMass=1000; InitialStandingFraction=0; InitialCPR=0; InitialCNR=80
        Fertiliser
        Manager Manage species present
          TheSpecies = AGPTallFescue, AGPRedClover
          script: same as in SlopeXAspect.Factors.Permutation.SitexSoil.No_sph.Manage species present
        PastureSpecies AGPRyegrass: doyGermination=275; daysEmergenceToAnthesis=120; daysAnthesisToMaturity=85; degreesDayForAnthesis=1100; degreesDayForMaturity=900; daysAnnualsFactor=45; CanopyType=PastureSpecies; InitialShootDM=1500; InitialRootDM=450; InitialRootDepth=450; initialDMFractionsGrasses=[0.15, 0.25, 0.25, 0.05, 0.05, 0.1, 0.1, 0.05, 0, 0, 0]; initialDMFractionsForbs=[0.2, 0.2, 0.15, 0.05, 0.1, 0.15, 0.1, 0.05, 0, 0, 0]; PhotosyntheticEfficiency=0.01; PhotosynthesisCurveFactor=0.8; FractionPAR=0.5; ReferenceCO2=380; CO2EffectScaleFactor=700; CO2EffectOffsetFactor=600; CO2EffectMinimum=0.7; CO2EffectExponent=2; ReproSeasonDurationCoeff=2; ReproSeasonShouldersLengthFactor=1; ReproSeasonOnsetDurationFactor=0.6; RelativeTurnoverEmerging=2; DetachmentDroughtCoefficient=3; DetachmentDroughtEffectMin=0.1; TurnoverStockFactor=0.01; TurnoverDefoliationEffectMin=0.025; MinimumGreenLeafProp=0.8; MinimumGreenRootProp=0.5
          initialDMFractionsLegumes=[0.16, 0.23, 0.22, 0.05, 0.03, 0.05, 0.05, 0.01, 0.04, 0.08, 0.08]
          LinearInterpolationFunction FVPDFunction
        PastureSpecies AGPWhiteClover: doyGermination=275; daysEmergenceToAnthesis=120; daysAnthesisToMaturity=85; degreesDayForAnthesis=1100; degreesDayForMaturity=900; daysAnnualsFactor=45; CanopyType=PastureSpecies; InitialShootDM=500; InitialRootDM=150; InitialRootDepth=130; initialDMFractionsGrasses=[0.15, 0.25, 0.25, 0.05, 0.05, 0.1, 0.1, 0.05, 0, 0, 0]; initialDMFractionsForbs=[0.2, 0.2, 0.15, 0.05, 0.1, 0.15, 0.1, 0.05, 0, 0, 0]; PhotosyntheticEfficiency=0.01; PhotosynthesisCurveFactor=0.8; FractionPAR=0.5; ReferenceCO2=380; CO2EffectScaleFactor=700; CO2EffectOffsetFactor=600; CO2EffectMinimum=0.7; CO2EffectExponent=2; ReproSeasonDurationCoeff=2; ReproSeasonShouldersLengthFactor=1; ReproSeasonOnsetDurationFactor=0.6; RelativeTurnoverEmerging=2; DetachmentDroughtCoefficient=3; DetachmentDroughtEffectMin=0.1; TurnoverStockFactor=0.01; TurnoverDefoliationEffectMin=0.025; MinimumGreenLeafProp=0.8; MinimumGreenRootProp=0.5
          initialDMFractionsLegumes=[0.16, 0.23, 0.22, 0.05, 0.03, 0.05, 0.05, 0.01, 0.04, 0.08, 0.08]
          LinearInterpolationFunction FVPDFunction
        PastureSpecies AGPBrownTop: doyGermination=275; daysEmergenceToAnthesis=120; daysAnthesisToMaturity=85; degreesDayForAnthesis=1100; degreesDayForMaturity=900; daysAnnualsFactor=45; CanopyType=PastureSpecies; InitialShootDM=1500; InitialRootDM=500; InitialRootDepth=200; initialDMFractionsGrasses=[0.15, 0.25, 0.25, 0.05, 0.05, 0.1, 0.1, 0.05, 0, 0, 0]; initialDMFractionsForbs=[0.2, 0.2, 0.15, 0.05, 0.1, 0.15, 0.1, 0.05, 0, 0, 0]; PhotosyntheticEfficiency=0.01; PhotosynthesisCurveFactor=0.8; FractionPAR=0.5; ReferenceCO2=380; CO2EffectScaleFactor=700; CO2EffectOffsetFactor=600; CO2EffectMinimum=0.7; CO2EffectExponent=2; ReproSeasonDurationCoeff=2; ReproSeasonShouldersLengthFactor=1; ReproSeasonOnsetDurationFactor=0.6; RelativeTurnoverEmerging=2; DetachmentDroughtCoefficient=3; DetachmentDroughtEffectMin=0.1; TurnoverStockFactor=0.01; TurnoverDefoliationEffectMin=0.025; MinimumGreenLeafProp=0.8; MinimumGreenRootProp=0.5; ResourceName=AGPBrowntop
          initialDMFractionsLegumes=[0.16, 0.23, 0.22, 0.05, 0.03, 0.05, 0.05, 0.01, 0.04, 0.08, 0.08]
          LinearInterpolationFunction FVPDFunction
        Report BiomassReport: EventNames=[Clock].EndOfDay
          VariableNames:
            [Clock].Today as Date
            ([AGPRyegrass].AboveGroundWt + [AGPBrownTop].AboveGroundWt + [AGPWhiteClover].AboveGroundWt) as Biomass //standing biomass (kgDM/ha)
            ([AGPRyegrass].Standing.Wt + [AGPBrownTop].Standing.Wt) as AGgrass //daily total aboveground grass (kgDM/ha)
            [AGPWhiteClover].Standing.Wt as AGClover // daily total aboveground clover (kgDM/ha)
        Report HarvestReport: EventNames=[Simplegrazing].Grazed
          VariableNames:
            [Clock].Today as Date
            ([AGPRyegrass].HarvestedWt + [AGPBrownTop].HarvestedWt + [AGPWhiteClover].HarvestedWt) as DayHarvDM // daily harvested DM (kgDM/ha)
            ([AGPWhiteClover].HarvestedWt*100/([AGPRyegrass].HarvestedWt + [AGPBrownTop].HarvestedWt + [AGPWhiteClover].HarvestedWt + 1)) as HarvCloverPc // harvested clover percent
        Report AnnualReport: EventNames=30-jun
          VariableNames:
            [Clock].Today.Year as Year
            // to combine cumulative outputs across calendar years to derive for a growing season (July-June)
            Sum of [AGPRyegrass].HerbageGrowthWt from [AnnualReport].DayAfterLastOutput to [Clock].Today as GrowYearRgHA // Net ryegrass growth for the growing year July-June (kgDM/ha)
            Sum of [AGPBrownTop].HerbageGrowthWt from [AnnualReport].DayAfterLastOutput to [Clock].Today as GrowYearBtHA // Net browntop growth for the growing year July-June (kgDM/ha)
            Sum of [AGPWhiteClover].HerbageGrowthWt from [AnnualReport].DayAfterLastOutput to [Clock].Today as GrowYearWcHA // Net white clover growth for the growing year July-June (kgDM/ha)
            Sum of ([AGPRyegrass].HerbageGrowthWt + [AGPBrownTop].HerbageGrowthWt + [AGPWhiteClover].HerbageGrowthWt) from [AnnualReport].DayAfterLastOutput to [Clock].Today as GrowYearHA // Net growth for the growing year July-June (kgDM/ha)
            Sum of ([AGPRyegrass].HarvestedWt + [AGPBrownTop].HarvestedWt + [AGPWhiteClover].HarvestedWt) from [AnnualReport].DayAfterLastOutput to [Clock].Today as GrowYearHarvest // cumulative harvesed DM from AGP for the growing year July-June (kgDM/ha)
        Soil: LocalName=Matamau Silt Loam; Site=Ballantrae; NearestTown=Woodville; Region=Hawke's Bay; Country=New Zealand; NaturalVegetation=Forest; Latitude=-40.325; Longitude=175.825; LocationAccuracy=5 km; DataSource=Alec Mackay
          Physical: same as SlopeXAspect.Factors.Permutation.Site.Ballantrae.Soil.Physical
          WaterBalance SoilWater: same as SlopeXAspect.Factors.Permutation.Site.Ballantrae.Soil.SoilWater
          Organic: same as SlopeXAspect.Factors.Permutation.Site.Ballantrae.Soil.Organic
          Chemical: Thickness=[50, 80, 200, 120, 170, 380]; PH=[6.5, 6.5, 6.5, 6.5, 6.5, 6.5]; PHUnits=Water
          Water: Thickness=[50, 80, 200, 120, 170, 380]; InitialValues=[0.399, 0.335, 0.308, 0.268, 0.198, 0.198]; InitialPAWmm=69.44; RelativeTo=LL15; FilledFromTop=true
          Solute NO3: same as SlopeXAspect.Factors.Permutation.Site.Ballantrae.Soil.NO3
          Solute NH4: same as SlopeXAspect.Factors.Permutation.Site.Ballantrae.Soil.NH4
          Solute Urea: same as SlopeXAspect.Factors.Permutation.Site.Ballantrae.Soil.Urea
          Nutrient
          SoilTemperature Temperature
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