Simulations: Version=205
  DataStore
  Memo
    From Example:

    Changed weather file to Ballantrae.

    Changed soil node to Matamau (Pallic); copied layer structure in and aligned to soil; copied OutptLayers in and retained structure.

    Set Prune and Pick to None

    Set AutoIrrigation amount to zero.

    SurfaceOrganicMatter set to grass with initial mass = 1000 and C:N = 80.

    Changed Apple to Poplar at 10 x 10 m with relevant params

    Disabled SPRUM; added AGPRyegrass and AGPWhiteClover; disabled SPRUM soil node and added AGPreygrass and AGPWhiteClover soil nodes to physical

    Added Forages node to simulation level (incl. Ryegrass, White Clover, STRUM parameters)

    Added Harvest report
  Simulation BallantraeNelder
    Clock: Start=2000-07-01; End=2010-07-30
    Summary SummaryFile
    Weather
      FileName=C:/Users/doddm/OneDrive - AgResearch/Documents/Apps/APSIM/Met files/Ballantrae1972-2024.met
    Forages
      Parameters:
        Name                          LiveDigestibility  DeadDigestibility  LiveFractionConsumable  DeadFractionConsumable  LiveMinimumBiomass  DeadMinimumBiomass
        SurfaceOrganicMatter.Residue  0.7                0.3                0                       0                       0                   0
        AGPRyegrass.Leaf              FromModel          FromModel          1                       1                       25                  0
        AGPRyegrass.Stem              FromModel          FromModel          1                       1                       10                  0
        AGPRyegrass.Stolon            FromModel          FromModel          1                       1                       0                   0
        AGPWhiteClover.Leaf           FromModel          FromModel          1                       1                       15                  0
        AGPWhiteClover.Stem           FromModel          FromModel          1                       1                       5                   0
        AGPWhiteClover.Stolon         FromModel          FromModel          1                       1                       5                   0
        -                             -                  -                  -                       -                       -                   -
        STRUM.Root                    FromModel          FromModel          0                       0                       100                 0
        STRUM.Leaf                    FromModel          FromModel          0                       0                       100                 0
        STRUM.Trunk                   FromModel          FromModel          0                       0                       100                 0
        STRUM.Fruit                   FromModel          FromModel          0                       0                       100                 0
    MicroClimate: a_interception=0; b_interception=1; c_interception=0; d_interception=0; SoilHeatFluxFraction=0.4; MinimumHeightDiffForNewLayer=0; NightInterceptionFraction=0.5; ReferenceHeight=2
    SoilArbitrator Soil Arbitrator
    Manager AutoIrrigationDeficitBased (disabled)
      AllowIrrigation = True
      depthPAWC = 1000
      triggerDeficit = 80
      irrigateAmount = 0
      returndays = 3
      IrrigateAlley = True
```csharp
using APSIM.Core;
using Models.Interfaces;
using System;
using Models.Core;
using Models.PMF;
using Models.Soils;
using System.Xml.Serialization;
using APSIM.Shared.Utilities;
using Newtonsoft.Json;

        
namespace Models
{
    [Serializable] 
    [System.Xml.Serialization.XmlInclude(typeof(Model))]
    public class Script : Model, IStructureDependency
    {
        [Link] private Clock Clock;
        [Link] private Zone patch;
        [Link] private ISummary summary;
        [Link] private Soil Soil;
        [Link(IsOptional = true)] private IPlant existingCrop;
        [Link] private IPhysical soilPhysical;
        [Link] private ISoilWater waterBalance;
        [Link(Type = LinkType.Scoped, ByName = true)] private Zone Row;
        [Link(Type = LinkType.Scoped, ByName = true)] private Zone Alley;
        private double TopDUL;
        private double TopLL;
        private int nLayers;
        public IStructure Structure { private get; set; }
        //[Link] private Irrigation Irrigation;
       
        // Parameters from user interface
        [Separator("Manager for controlling automatic irrigation")]
        [Description(" Allow this manager to control irrigation?")]
        public bool AllowIrrigation { get; set; }
      
        [Separator(" Parameters for the irrigation system")]
        [Description(" Depth to calculate PAWC and deficit (mm)")]
        public double depthPAWC { get; set; }
        [Description(" Deficit to trigger irrigations (% PAWC)")]
        public double triggerDeficit { get; set; }
        [Description(" Irrigation amount to apply each event (mm)")]
        public double irrigateAmount { get; set; }
        [Description(" Minimum days for irrigation to return")]
        public double returndays { get; set; }
        
        [Description("Is the Alley zone irrigated?")]
        public bool IrrigateAlley {get; set;}

        //Class members
        [JsonIgnore] public double IrrigLayerSWDeficit { get; set; }
        [JsonIgnore] public double TopSWC { get; set; }
        [JsonIgnore] public double DaysSinceIrrigation { get; set; }
        [JsonIgnore] public double AmountToApply { get; set; }
        [JsonIgnore] public double SeasonAppliedAmount { get; set; }
        
        private bool IrrigationIsAllowed { get; set; }
        private bool CropIsActive { get; set; }
        private bool IrrigatorIsAvailable { get; set; }
        private bool SoilIsDry { get; set; }

    
        //Calculate static soil variables

        

        [EventSubscribe("StartOfSimulation")]
        private void OnStartOfSimulation(object sender, EventArgs e)
        {
            
            //Can we irrigate at all?
            IrrigationIsAllowed = false; 
            if (AllowIrrigation)
                IrrigationIsAllowed = true; 

            //Calculate soil water variables
            double depthFromSurface = 0.0;
            double fracLayer = 0.0;
            nLayers = soilPhysical.Thickness.Length;
            for (int layer = 0; layer < nLayers; layer++)
            {
                fracLayer = Math.Min(1.0, (depthPAWC - depthFromSurface) / soilPhysical.Thickness[layer]);
                TopLL += soilPhysical.LL15mm[layer] * fracLayer;
                TopDUL += soilPhysical.DULmm[layer] * fracLayer;
                depthFromSurface += soilPhysical.Thickness[layer];
                if (depthFromSurface >= depthPAWC)
                    layer = nLayers;
            }
        }
             
        //Determine daily requirement for irrigation
        [EventSubscribe("StartOfDay")]
        private void OnStartOfDay(object sender, EventArgs e)
        {
            AmountToApply = 0.0;
            DaysSinceIrrigation += 1;

            //Is the row crop actively growing?
            CropIsActive = false;
            double StageCode = (double)Structure.Get("STRUM.Phenology.Stage", relativeTo: Row);
            if ((StageCode > 3.0) && (StageCode<5.0))
            {
                CropIsActive = true;
            }
          
            //Is the irrigator available?
            IrrigatorIsAvailable = false;
            if (DaysSinceIrrigation >= returndays)
                IrrigatorIsAvailable = true;
          
            //Is the soil dry enough to require irrigation?
            SoilIsDry = false;
            double depthFromSurface = 0.0;
            double fracLayer = 0.0;
            TopSWC = 0.0;
            for (int layer = 0; layer < nLayers; layer++)
            //for (int layer = 0; depthFromSurface < depthPAWC + soilPhysical.Thickness[layer]; layer++)
            {
                fracLayer = Math.Min(1.0, (depthPAWC - depthFromSurface) / soilPhysical.Thickness[layer]);
                TopSWC += waterBalance.SWmm[layer] * fracLayer;
                depthFromSurface += soilPhysical.Thickness[layer];
                if (depthFromSurface >= depthPAWC)
                    layer = nLayers;
            }
            
            IrrigLayerSWDeficit = TopSWC - TopDUL;
            if (Math.Max(0.0, -IrrigLayerSWDeficit) >= (TopDUL - TopLL) * (100 - triggerDeficit) / 100)
                SoilIsDry = true;

            //Are all the conditions ratifying irrigation
            if (IrrigationIsAllowed && CropIsActive && IrrigatorIsAvailable && SoilIsDry)
            {
                //Lets irrigate well !!!!
                Irrigation irrigRow = (Irrigation)Structure.Get("Irrigation", relativeTo: Row);
                irrigRow.Apply(irrigateAmount, depth: 0);
                DaysSinceIrrigation = 0;
                if (IrrigateAlley)
                {
                   Irrigation irrigAlley = (Irrigation)Structure.Get("Irrigation", relativeTo: Alley);
                   irrigAlley.Apply(irrigateAmount , depth: 0);           
                }
            }
        }
    }
}
```
    Manager AutomaticFertiliser (disabled)
      AllowFertiliser = yes
      Depth2SoilN = 1500
      CriticalSoilN = 30
      FertNAmount = 50
      FertType = UreaN
      FertApplicationDepth = 10
      FertMinimumDays = 15
```csharp
using APSIM.Core;
using System;
using Models.Core;
using Models.PMF;
using Models.Soils;
using APSIM.Shared.Utilities;
using System.Xml.Serialization;
using Models.Interfaces;
using Models.Soils.Nutrients;
using Newtonsoft.Json;

namespace Models
{
    [Serializable]
    public class Script : Model, IStructureDependency
    {
        [Link] private Clock Clock;
        [Link] private Fertiliser fertiliser;
        [Link] private ISummary summary;
        [Link] private Soil Soil;
        [Link(Type = LinkType.Scoped, ByName = true)] private Zone Row;
        private DateTime lastApplicationDate;
        private bool fertiliserIsAllowed;
        private int nLayers;
        [Link(ByName = true)]
        private ISolute NO3;
        [Link(ByName = true)]
        private ISolute NH4;
        [Link(ByName = true)]
        private ISolute Urea;
        [Link]
        private IPhysical soilPhysical;
        public IStructure Structure { private get; set; }

        //User inputs from properties tab
        [Description("Turn fertiliser applications on? ")]
        public yesnoType AllowFertiliser { get; set; }
        
        [Description("Depth to calculate available soil N (mm): ")]
        public double Depth2SoilN { get; set; }

        [Description("Minimum available N, triggers an application (kgN/ha): ")]
        public double CriticalSoilN { get; set; }

        [Description("Amount of N fertiliser for each application (kgN/ha): ")]
        public double FertNAmount { get; set; }

        [Description("Type of N fertiliser to apply: ")]
        [Display(Type = DisplayType.FertiliserType)]public string FertType { get; set; }

        [Description("Depth at which to apply the fertiliser (mm): ")]
        public double FertApplicationDepth { get; set; }
       
        [Description("Minimum period between applications (days): ")]
        public double FertMinimumDays { get; set; }
       
        public enum yesnoType
        {
            /// <summary>a positive answer</summary>
            yes,
            /// <summary>a negative answer</summary>
            no
        }

        [JsonIgnore] public double TopMineralN { get; set; }
        private bool CropIsActive { get; set; }
        


        

        [EventSubscribe("StartOfSimulation")]
        private void OnStartOfSimulation(object sender, EventArgs e)
        {
            fertiliserIsAllowed = (AllowFertiliser == yesnoType.yes);
            nLayers = soilPhysical.Thickness.Length;
        }

        [EventSubscribe("DoManagement")]
        private void OnDoManagement(object sender, EventArgs e)
        {
            double daysSinceLastApplication = (Clock.Today - lastApplicationDate).TotalDays;
            
            //Is the row crop actively growing?
            CropIsActive = false;
            double StageCode = (double)Structure.Get("STRUM.Phenology.Stage", relativeTo: Row);
            if ((StageCode > 3.0) && (StageCode<5.0))
            {
                CropIsActive = true;
            }
            
            // get the N stored in the soil
            double depthFromSurface = 0.0;
            double fracLayer = 0.0;
            TopMineralN = 0.0;
            for (int layer = 0; layer < nLayers; layer++)
            {
                fracLayer = Math.Min(1.0, (Depth2SoilN - depthFromSurface) / soilPhysical.Thickness[layer]);
                TopMineralN += (NO3.kgha[layer]
                + NH4.kgha[layer]
                + Urea.kgha[layer])
                * fracLayer;
                depthFromSurface += soilPhysical.Thickness[layer];
                if (depthFromSurface >= Depth2SoilN)
                    layer = nLayers;
            }

            if (fertiliserIsAllowed && CropIsActive && (daysSinceLastApplication >= FertMinimumDays) && (TopMineralN <= CriticalSoilN))
            {
                fertiliser.Apply(FertNAmount, FertType, FertApplicationDepth);
                lastApplicationDate = Clock.Today;
            }
        }
    }
}
```
    ZoneAgregate (disabled)
    Report ZoneAgregateReport (disabled): EventNames=[Clock].EndOfDay
      VariableNames:
        [Clock].Today
        [ZoneAgregate].SimulationArea
        [ZoneAgregate].Eop.Amount
        [ZoneAgregate].Eop.Pm2
        [ZoneAgregate].Eop.AmountByZone[1]
        [ZoneAgregate].Eop.AmountByZone[2]
        [ZoneAgregate].Ro.Amount
        [ZoneAgregate].Ro.Pm2
        [ZoneAgregate].Ro.AmountByZone[1]
        [ZoneAgregate].Ro.AmountByZone[2]
        [ZoneAgregate].Ri.Amount
        [ZoneAgregate].Ri.Pm2
        [ZoneAgregate].Ri.AmountByZone[1]
        [ZoneAgregate].Ri.AmountByZone[2]
        [ZoneAgregate].Et.Amount
        [ZoneAgregate].Et.Pm2
        [ZoneAgregate].Et.AmountByZone[1]
        [ZoneAgregate].Et.AmountByZone[2]
        [ZoneAgregate].AccumulatedIrrigation.Amount
        [ZoneAgregate].AccumulatedIrrigation.Pm2
        [ZoneAgregate].AccumulatedIrrigation.AmountByZone[1]
        [ZoneAgregate].AccumulatedIrrigation.AmountByZone[2]
        [ZoneAgregate].AccumulatedNitrogen.Amount
        [ZoneAgregate].AccumulatedNitrogen.Pm2
        [ZoneAgregate].AccumulatedNitrogen.AmountByZone[1]
        [ZoneAgregate].AccumulatedNitrogen.AmountByZone[2]
        [ZoneAgregate].FintTreeGreen
        [ZoneAgregate].FintTreeDead
        [ZoneAgregate].FintTreeTotal
        [ZoneAgregate].FintUnderstoryGreen
        [ZoneAgregate].FintUnderstoryDead
    Report ZoneAgregateReport1: VariableNames=[Clock].Today; EventNames=[Clock].EndOfDay
    RectangularZone Row: Length=100; Width=1.3; CanopyType=TreeRow; Slope=0; AspectAngle=0; Altitude=50
      SurfaceOrganicMatter: InitialResidueName=grass; InitialResidueType=grass; InitialResidueMass=1000; InitialStandingFraction=0; InitialCPR=0; InitialCNR=80
      Fertiliser
      Irrigation
      Plant STRUM
      StrumTreeInstance Poplar: TreeType=Deciduous; RowSpacing=10; InterRowSpacing=10; AlleyZoneWidthFrac=0.01; AgeAtSimulationStart=1; YearsToMaxDimension=20; TrunkMassAtMaxDimension=1500; BudBreakDate=1-Oct; StartFullCanopyDate=1-Dec; StartLeafFallDate=1-Mar; EndLeafFallDate=30-Apr; GRINZ=true; MaxRD=2000; Proot=0.05; Pleaf=0.15; Ptrunk=0.6; CanopyBaseHeight=2000; MaxPrunedHeight=2500; MaxHeight=3500; MaxWidth=4500; MaxPrunedWidth=3500; RootNConc=0.01; LeafNConc=0.02; TrunkNConc=0.01; FruitNConc=0.02; ExtinctCoeff=0.6; BaseCover=0; MaxCover=0.95; RUE=1.6; PSBaseT=5; PSLOptT=20; PSUOptT=25; PSMaxT=35; GSMax=0.006; R50=100; SurfaceKL=0.1; WaterStress=false; Number=50; PotentialFWPerFruit=175; DMC=0.2; FruitDensity=0.75; DateMaxBloom=1-oct; DAFStartLinearGrowth=30; DAFEndLinearGrowth=90; DAFMaxSize=150
      BiomassRemovalEvents Pick: NameOfPlantToRemoveFrom=STRUM; RemovalType=5; RemovalDates=[1-may]
        BiomassRemovalFractions:
          PlantName  OrganName  TypeString  LiveToRemove  DeadToRemove  LiveToResidue  DeadToResidue
          STRUM      Root       None        0             0             0              0
          STRUM      Leaf       None        0             0             0              0
          STRUM      Trunk      None        0             0             0              0
          STRUM      Fruit      None        0             0             0              0
      BiomassRemovalEvents Prune: NameOfPlantToRemoveFrom=STRUM; RemovalType=5; RemovalDates=[1-Jun]
        BiomassRemovalFractions:
          PlantName  OrganName  TypeString  LiveToRemove  DeadToRemove  LiveToResidue  DeadToResidue
          STRUM      Root       None        0             0             0              0
          STRUM      Leaf       None        0             0             0              0
          STRUM      Trunk      None        0             0             0              0
          STRUM      Fruit      None        0             0             0              0
      Report RowZoneReport: EventNames=[Clock].DoReport
        VariableNames:
          [Clock].Today
          [Row].Area
          [Row].STRUM.CanopyArea
          [Row].STRUM.RootUptakesArbitrator.WaterDemand.Amount
          [Row].STRUM.RootUptakesArbitrator.WaterDemand.mm
          [Row].STRUM.RootUptakesArbitrator.NitrogenDemand.Amount
          [Row].STRUM.Root.Network.WtByLayerZone1
          [Row].STRUM.Root.Network.WtByLayerZone2
          [Row].STRUM.Arbitrator.Carbon.TotalPlantDemand
          [Row].STRUM.Arbitrator.Carbon.TotalPlantSupply
          [Row].STRUM.Arbitrator.Carbon.TotalPlantDemandsAllocated
          [Row].STRUM.Arbitrator.Fn
          [Row].STRUM.Arbitrator.Nitrogen.TotalPlantDemand
          [Row].STRUM.Arbitrator.Nitrogen.TotalPlantSupply
          [Row].STRUM.Arbitrator.Nitrogen.TotalPlantDemandsAllocated
          [Row].STRUM.Fruit.TotalCarbonDemand.RelativeFruitMass.Delta.Integral
          [Row].STRUM.Fruit.Allocated.Carbon.Total
          [Row].STRUM.Fruit.Allocated.Nitrogen.Total
          [Row].STRUM.Fruit.Carbon.Demands.Structural
          [Row].STRUM.Fruit.Carbon.Demands.Total
          [Row].STRUM.Fruit.DMC
          [Row].STRUM.Fruit.FreshWtPerFruit
          [Row].STRUM.Fruit.NextYearsFruitingBudSurvival
          [Row].STRUM.Fruit.Number.BudsSurvivalFromLastYear
          [Row].STRUM.Fruit.N
          [Row].STRUM.Fruit.Nitrogen.Demands.Total
          [Row].STRUM.Fruit.Number
          [Row].STRUM.Fruit.Diameter
          [Row].STRUM.Fruit.VolumePerFruit
          [Row].STRUM.Fruit.Wt
          [Row].STRUM.Fruit.PotentialDWPerFruit
          [Row].STRUM.Fruit.TotalCarbonDemand.RelativeFruitMass
          [Row].STRUM.Fruit.TotalCarbonDemand.CarbonConc
          [Row].STRUM.Height
          [Row].STRUM.Height.CanopyBaseHeight
          [Row].STRUM.Height.CanopyBaseHeight  + [Row].STRUM.Height.PrunedCanopyDepth
          [Row].STRUM.Height.CanopyBaseHeight  + [Row].STRUM.Height.PrunedCanopyDepth + [Row].STRUM.Height.SeasonalGrowth
          [Row].STRUM.Leaf.Allocated.Carbon.Total
          [Row].STRUM.Leaf.Allocated.Nitrogen.Total
          [Row].STRUM.Leaf.Canopy.CoverGreen
          [Row].STRUM.Leaf.Dead.Wt
          [Row].STRUM.Leaf.Carbon.Demands.Structural
          [Row].STRUM.Leaf.Carbon.Demands.Total
          [Row].STRUM.Leaf.Fn
          [Row].STRUM.Leaf.Canopy.Fw
          [Row].STRUM.Leaf.Canopy.LAI
          [Row].STRUM.Leaf.Live.Wt
          [Row].STRUM.Leaf.N
          [Row].STRUM.Leaf.Nitrogen.Demands.Total
          [Row].STRUM.Leaf.Canopy.PotentialEP
          [Row].STRUM.Leaf.Canopy.RadiationIntercepted
          [Row].STRUM.Leaf.Senesced.Weight.Structural
          [Row].STRUM.Leaf.SenescenceRate
          [Row].STRUM.Leaf.Canopy.Transpiration
          [Row].STRUM.Leaf.Canopy.WaterDemand
          [Row].STRUM.Leaf.Canopy.WaterAllocation
          [Row].STRUM.Leaf.Canopy.Width
          [Row].STRUM.Leaf.Canopy.GreenExtinctionCoefficient
          [Row].STRUM.Leaf.Wt
          [Row].STRUM.Phenology.Age.YearDecimal
          [Row].STRUM.Phenology.Age.Years
          [Row].STRUM.Phenology.CurrentStageName
          [Row].STRUM.Phenology.DaysSinceFlowering
          [Row].STRUM.Phenology.Stage
          [Row].STRUM.RelativeSeasonalDimension
          [Row].STRUM.RelativeAnnualDimension
          [Row].STRUM.Root.Allocated.Carbon.Total
          [Row].STRUM.Root.Allocated.Nitrogen.Total
          [Row].STRUM.Root.Network.Depth
          [Row].STRUM.Root.Carbon.Demands.Structural
          [Row].STRUM.Root.Carbon.Demands.Total
          [Row].STRUM.Root.N
          [Row].STRUM.Root.Nitrogen.Demands.Total
          [Row].STRUM.RootUptakesArbitrator.WaterUptake.AmountByZone
          [Row].STRUM.RootUptakesArbitrator.WaterUptake.Mm
          [Row].STRUM.RootUptakesArbitrator.WaterUptake.Amount
          [Row].STRUM.RootUptakesArbitrator.NitrogenUptake.AmountByZone
          [Row].STRUM.RootUptakesArbitrator.NitrogenUptake.Gpm2
          [Row].STRUM.RootUptakesArbitrator.NitrogenUptake.Amount
          [Row].STRUM.RootUptakesArbitrator.WaterSupply.AmountByZone
          [Row].STRUM.RootUptakesArbitrator.WaterSupply.Mm
          [Row].STRUM.RootUptakesArbitrator.WaterSupply.Amount
          [Row].STRUM.RootUptakesArbitrator.NitrogenSupply.AmountByZone
          [Row].STRUM.RootUptakesArbitrator.NitrogenSupply.Gpm2
          [Row].STRUM.RootUptakesArbitrator.NitrogenSupply.Amount
          [Row].STRUM.Root.Wt
          [Row].STRUM.TranspirationPerTree
          [Row].STRUM.Trunk.Allocated.Carbon.Total
          [Row].STRUM.Trunk.Allocated.Nitrogen.Total
          [Row].STRUM.Trunk.Carbon.Demands.Structural
          [Row].STRUM.Trunk.Carbon.Demands.Total
          [Row].STRUM.Trunk.EnergyBalance.CoverTotal
          [Row].STRUM.Trunk.EnergyBalance.DeadAreaIndex
          [Row].STRUM.Trunk.EnergyBalance.LAIDead
          [Row].STRUM.Trunk.EnergyBalance.RadiationInterceptedByDead
          [Row].STRUM.Trunk.EnergyBalance.Transpiration
          [Row].STRUM.Trunk.N
          [Row].STRUM.Trunk.Nitrogen.Demands.Total
          [Row].STRUM.Trunk.Wt
          [Row].STRUM.Width
          [Row].STRUM.Width.PrunedWidth
          [Row].STRUM.Width.PrunedWidth + [Row].STRUM.Width.SeasonalGrowth
          [Row].STRUM.TranspirationPerLeafArea
          [Row].SurfaceOrganicMatter.N
          [Row].SurfaceOrganicMatter.Wt
          [Row].Irrigation.IrrigationApplied
          [Row].Fertiliser.NitrogenApplied
          sum([Row].Soil.OutputLayers.SWmm)
          ([Row].Soil.OutputLayers.SWmm[1] + [Row].Soil.OutputLayers.SWmm[1] + [Row].Soil.OutputLayers.SWmm[1]) as SWmm90
          [Row].Soil.OutputLayers.SW
          [Row].Soil.OutputLayers.SAT
          [Row].Soil.OutputLayers.DUL
          [Row].Soil.OutputLayers.LL15
          [Row].Soil.SoilWater.Evaporation
          [Row].Soil.SoilWater.Eo
          [Weather].PanEvap
          [Weather].Radn
          [Weather].Rain
      Soil Soil1: LocalName=Matamau Silt Loam; Site=Ballantrae; NearestTown=Woodville; Region=Hawke's Bay; Country=New Zealand; NaturalVegetation=Forest; Latitude=-40.325; Longitude=175.825; LocationAccuracy=5 km; DataSource=Alec Mackay
        Physical
          Thickness  ParticleSizeSand  ParticleSizeSilt  ParticleSizeClay  Rocks  BD    AirDry  LL15   DUL    SAT    KS
          50         21                50                29                0      0.92  0.055   0.167  0.446  0.576  11984
          80         17                58                25                0      1.12  0.057   0.173  0.438  0.523  3618
          200        16                60                24                0      1.27  0.06    0.181  0.432  0.481  514
          120        15                60                25                0      1.32  0.06    0.179  0.406  0.467  353
          170        15                60                25                0      1.45  0.06    0.182  0.396  0.45   233
          380        15                60                25                0      1.45  0.06    0.182  0.396  0.45   233
          1000       15                60                25                0      1.45  0.06    0.182  0.396  0.45   233
          SoilCrop STRUMSoil: LL=[0.2, 0.2, 0.2, 0.2, 0.2, 0.2, 0.2]; KL=[1, 1, 1, 1, 1, 1, 1]; XF=[1, 1, 1, 1, 1, 1, 1]
          SoilCrop SPRUMSoil: LL=[0.2, 0.2, 0.2, 0.2, 0.2, 0.2, 0.2]; KL=[0.11, 0.11, 0.11, 0.11, 0.11, 0.11, 0.11]; XF=[1, 1, 1, 1, 1, 1, 1]
        WaterBalance SoilWater: SummerDate=1-Nov; SummerU=9.12; SummerCona=3; WinterDate=1-Apr; WinterU=9.12; WinterCona=3; DiffusConst=0; DiffusSlope=0; Salb=0.13; CN2Bare=73; CNRed=20; CNCov=0.8; PSIDul=-100; Thickness=[50, 80, 200, 120, 170, 380, 1000]; SWCON=[0.4, 0.4, 0.6, 0.6, 0.7, 0.7, 0.7, -]
        Organic: FOMCNRatio=10; CarbonUnits=Total
          Thickness  Carbon  SoilCNRatio  FBiom  FInert  FOM
          50         5       11           0.08   0.45    36
          80         2       11           0.07   0.34    31
          200        1       11           0.02   0.51    21
          120        0.5     11           0.02   0.87    15
          170        0.2     11           0.01   0.96    2
          380        0.1     11           0.01   0.96    2
          1000       0.05    11           0.01   0.96    2
        Chemical: PHUnits=Water
          Thickness  PH   CEC
          50         6.5  20.4
          80         6.5  12.314
          200        6.5  9.73
          120        6.5  8.805
          170        6.5  8.13
          380        6.5  7.905
          CEC source: Calculated
        Water: Thickness=[50, 80, 200, 120, 170, 380, 1000]; InitialValues=[0.399, 0.335, 0.308, 0.268, 0.198, 0.198, 0.198]; FilledFromTop=true
        Solute NO3: Thickness=[50, 80, 200, 120, 170, 380, 1900]; InitialValues=[15, 15, 7, 7, 4, 4, 4]; InitialValuesUnits=ppm; WaterTableConcentration=0; D0=0; DepthConstant=0; MaxDepthSoluteAccessible=0; RunoffEffectivenessAtMovingSolute=0; MaxEffectiveRunoff=0
        Solute NH4: Thickness=[50, 80, 200, 120, 170, 380, 1000]; InitialValues=[1, 1, 0.5, 0.5, 0.3, 0.3, 0.3]; InitialValuesUnits=ppm; WaterTableConcentration=0; D0=0; DepthConstant=0; MaxDepthSoluteAccessible=0; RunoffEffectivenessAtMovingSolute=0; MaxEffectiveRunoff=0
        Solute Urea: Thickness=[50, 80, 200, 120, 170, 380, 1000]; InitialValues=[0, 0, 0, 0, 0, 0, 0]; InitialValuesUnits=kg/ha; WaterTableConcentration=0; D0=0; DepthConstant=0; MaxDepthSoluteAccessible=0; RunoffEffectivenessAtMovingSolute=0; MaxEffectiveRunoff=0
        Nutrient
        SoilTemperature Temperature
        LayerStructure: Thickness=[50, 80, 200, 120, 170, 380, 1000]
        OutputLayers: Thickness=[300, 300, 300, 300, 300, 300]
    RectangularZone Alley: Length=100; Width=2.2; CanopyType=TreeRow; Slope=0; AspectAngle=0; Altitude=50
      SurfaceOrganicMatter: InitialResidueName=grass; InitialResidueType=grass; InitialResidueMass=1000; InitialStandingFraction=0; InitialCPR=0; InitialCNR=80
      Fertiliser
      Irrigation
      PastureSpecies AGPRyegrass: doyGermination=275; daysEmergenceToAnthesis=120; daysAnthesisToMaturity=85; degreesDayForAnthesis=1100; degreesDayForMaturity=900; daysAnnualsFactor=45; CanopyType=PastureSpecies; InitialShootDM=1500; InitialRootDM=450; InitialRootDepth=450; initialDMFractionsGrasses=[0.15, 0.25, 0.25, 0.05, 0.05, 0.1, 0.1, 0.05, 0, 0, 0]; initialDMFractionsForbs=[0.2, 0.2, 0.15, 0.05, 0.1, 0.15, 0.1, 0.05, 0, 0, 0]; PhotosyntheticEfficiency=0.01; PhotosynthesisCurveFactor=0.8; FractionPAR=0.5; ReferenceCO2=380; CO2EffectScaleFactor=700; CO2EffectOffsetFactor=600; CO2EffectMinimum=0.7; CO2EffectExponent=2; ReproSeasonDurationCoeff=2; ReproSeasonShouldersLengthFactor=1; ReproSeasonOnsetDurationFactor=0.6; RelativeTurnoverEmerging=2; DetachmentDroughtCoefficient=3; DetachmentDroughtEffectMin=0.1; TurnoverStockFactor=0.01; TurnoverDefoliationEffectMin=0.025; MinimumGreenLeafProp=0.8; MinimumGreenRootProp=0.5
        initialDMFractionsLegumes=[0.16, 0.23, 0.22, 0.05, 0.03, 0.05, 0.05, 0.01, 0.04, 0.08, 0.08]
        LinearInterpolationFunction FVPDFunction
      PastureSpecies AGPWhiteClover: doyGermination=275; daysEmergenceToAnthesis=120; daysAnthesisToMaturity=85; degreesDayForAnthesis=1100; degreesDayForMaturity=900; daysAnnualsFactor=45; CanopyType=PastureSpecies; InitialShootDM=500; InitialRootDM=150; InitialRootDepth=130; initialDMFractionsGrasses=[0.15, 0.25, 0.25, 0.05, 0.05, 0.1, 0.1, 0.05, 0, 0, 0]; initialDMFractionsForbs=[0.2, 0.2, 0.15, 0.05, 0.1, 0.15, 0.1, 0.05, 0, 0, 0]; PhotosyntheticEfficiency=0.01; PhotosynthesisCurveFactor=0.8; FractionPAR=0.5; ReferenceCO2=380; CO2EffectScaleFactor=700; CO2EffectOffsetFactor=600; CO2EffectMinimum=0.7; CO2EffectExponent=2; ReproSeasonDurationCoeff=2; ReproSeasonShouldersLengthFactor=1; ReproSeasonOnsetDurationFactor=0.6; RelativeTurnoverEmerging=2; DetachmentDroughtCoefficient=3; DetachmentDroughtEffectMin=0.1; TurnoverStockFactor=0.01; TurnoverDefoliationEffectMin=0.025; MinimumGreenLeafProp=0.8; MinimumGreenRootProp=0.5
        initialDMFractionsLegumes=[0.16, 0.23, 0.22, 0.05, 0.03, 0.05, 0.05, 0.01, 0.04, 0.08, 0.08]
        LinearInterpolationFunction FVPDFunction
      SimpleGrazing: GrazingRotationType=1; SimpleGrazingFrequencyString=21; SimpleMinGrazable=1600; SimpleGrazingResidual=1500; FlexibleGrazePostDM=0; IsCutAndCarry=false; FractionClippingsReturned=0; FractionIntakeNToAnimal=[0.3]; DungNConc=2.6; FractionOfDungUrineOffPaddock=[0.1]; DepthUrineIsAdded=30; ShowAdvancedExcretaOptions=false; SendDungElsewhere=0; SendUrineElsewhere=0; UsePatching=false; PseudoPatches=true; ZoneCount=25; UrineReturnPattern=2; PseudoRandomSeed=666; MaxEffectiveNConcentration=3.5; FractionPopulationDecline=0; TramplingOn=true; MaximumPropLitterMovedToSoil=0.1; PastureConsumedAtMaximumRateOfLitterRemoval=1200
        PreGrazeDMArray=[2600, 2500, 2500, 2500, 2500, 2500, 2500, 2500, 2600, 2700, 2800, 2700]
        PostGrazeDMArray=[1500, 1500, 1500, 1500, 1400, 1400, 1400, 1400, 1500, 1500, 1600, 1500]
      Plant SPRUM (disabled)
      SprumPastureInstance UnderStoryPasture (disabled): AgeAtSimulationStart=0; YearsToMaxDimension=1; RUE=1; Presidue=0; RsenRate=0; Proot=0.1; PSBaseT=5; PSLOptT=20; PSUOptT=25; PSMaxT=30; GRINZ=true; MaxRD=600; MaxHeight=300; MaxPrunedHeight=100; MaxCover=0.97; MinCover=0.5; ExtinctCoeff=0.5; RegrowthDuration=300; FullCanopyDuration=0; BaseT=3; OptT=25; MaxT=35; RootNConc=0.01; LeafNConc=0.05; ResidueNConc=0.01; LegumePropn=0.2; GSMax=0.004; R50=150; SurfaceKL=0.1; WaterStress=true
      BiomassRemovalEvents Mow (disabled): NameOfPlantToRemoveFrom=SPRUM; RemovalType=0
        RemovalDates=[1-jan, 1-feb, 1-mar, 1-apr, 1-jun, 1-aug, 1-sep, 1-oct, 1-nov, 1-dec]
        BiomassRemovalFractions:
          PlantName  OrganName  TypeString  LiveToRemove  DeadToRemove  LiveToResidue  DeadToResidue
          SPRUM      Residue    Cutting     0             0             0.5            0.5
          SPRUM      Leaf       Cutting     0             0             1              1
          SPRUM      Nodule     Cutting     0             0             0              0
          SPRUM      Root       Cutting     0             0             0              0
      Soil Soil1: LocalName=Matamau Silt Loam; Site=Ballantrae; NearestTown=Woodville; Region=Hawke's Bay; Country=New Zealand; NaturalVegetation=Forest; Latitude=-40.325; Longitude=175.825; LocationAccuracy=5 km; DataSource=Alec Mackay
        Physical
          Thickness  ParticleSizeSand  ParticleSizeSilt  ParticleSizeClay  Rocks  BD    AirDry  LL15   DUL    SAT    KS
          50         21                50                29                0      0.92  0.055   0.167  0.446  0.576  11984
          80         17                58                25                0      1.12  0.057   0.173  0.438  0.523  3618
          200        16                60                24                0      1.27  0.06    0.181  0.432  0.481  514
          120        15                60                25                0      1.32  0.06    0.179  0.406  0.467  353
          170        15                60                25                0      1.45  0.06    0.182  0.396  0.45   233
          380        15                60                25                0      1.45  0.06    0.182  0.396  0.45   233
          1000       15                60                25                0      1.45  0.06    0.182  0.396  0.45   233
          SoilCrop AGPRyegrassSoil: LL=[0.177, 0.183, 0.191, 0.189, 0.192, 0.192, 0.182]; KL=[0.06, 0.06, 0.06, 0.06, 0, 0, 0.06]; XF=[1, 1, 1, 1, 0, 0, 1]
            LL, KL, XF source: Calculated (layer 7)
          SoilCrop AGPWhiteCloverSoil: LL=[0.197, 0.203, 0.211, 0.209, 0.212, 0.212, 0.182]; KL=[0.06, 0.06, 0, 0, 0, 0, 0.06]; XF=[1, 1, 0, 0, 0, 0, 1]
            LL, KL, XF source: Calculated (layer 7)
          SoilCrop STRUMSoil: LL=[0.2, 0.2, 0.2, 0.2, 0.2, 0.2, 0.2]; KL=[1, 1, 1, 1, 1, 1, 1]; XF=[1, 1, 1, 1, 1, 1, 1]
          SoilCrop SPRUMSoil: LL=[0.2, 0.2, 0.2, 0.2, 0.2, 0.2, 0.2]; KL=[0.11, 0.11, 0.11, 0.11, 0.11, 0.11, 0.11]; XF=[1, 1, 1, 1, 1, 1, 1]
        WaterBalance SoilWater: same as BallantraeNelder.Row.Soil1.SoilWater
        Organic: same as BallantraeNelder.Row.Soil1.Organic
        Chemical: same as BallantraeNelder.Row.Soil1.Chemical
        Water: Thickness=[50, 80, 200, 120, 170, 380, 1000]; InitialValues=[0.399, 0.335, 0.308, 0.268, 0.198, 0.198, 0.198]; FilledFromTop=true
        Solute NO3: Thickness=[50, 80, 200, 120, 170, 380, 1000]; InitialValues=[15, 15, 7, 7, 4, 4, 4]; InitialValuesUnits=ppm; WaterTableConcentration=0; D0=0; DepthConstant=0; MaxDepthSoluteAccessible=0; RunoffEffectivenessAtMovingSolute=0; MaxEffectiveRunoff=0
        Solute NH4: same as BallantraeNelder.Row.Soil1.NH4
        Solute Urea: same as BallantraeNelder.Row.Soil1.Urea
        Nutrient
        SoilTemperature Temperature
        LayerStructure: Thickness=[50, 80, 200, 120, 170, 380, 1000]
        OutputLayers: Thickness=[300, 300, 300, 300, 300, 500]
      Report AlleyZoneReport (disabled): EventNames=[Clock].DoReport
        VariableNames:
          [Clock].Today
          [Alley].Area
          [Alley].SPRUM.RootUptakesArbitrator.WaterDemand.Amount
          [Alley].SPRUM.RootUptakesArbitrator.WaterSupply.Amount
          [Alley].SPRUM.RootUptakesArbitrator.WaterUptake.Amount
          [Alley].SPRUM.RootUptakesArbitrator.NitrogenDemand.Amount
          [Alley].SPRUM.RootUptakesArbitrator.NitrogenSupply.Amount
          [Alley].SPRUM.RootUptakesArbitrator.NitrogenUptake.Amount
          [Alley].SPRUM.Root.Network.WtByLayerZone1
          [Alley].SPRUM.Root.Network.WtByLayerZone2
          [Alley].SPRUM.Arbitrator.Carbon.TotalPlantDemand
          [Alley].SPRUM.Arbitrator.Carbon.TotalPlantSupply
          [Alley].SPRUM.Arbitrator.Carbon.TotalPlantDemandsAllocated
          [Alley].SPRUM.Arbitrator.Fn
          [Alley].SPRUM.Arbitrator.Nitrogen.TotalPlantDemand
          [Alley].SPRUM.Arbitrator.Nitrogen.TotalPlantSupply
          [Alley].SPRUM.Arbitrator.Nitrogen.TotalPlantDemandsAllocated
          [Alley].SPRUM.Height
          [Alley].SPRUM.Leaf.Allocated.Carbon.Total
          [Alley].SPRUM.Leaf.Allocated.Nitrogen.Total
          [Alley].SPRUM.Leaf.Canopy.CoverGreen
          [Alley].SPRUM.Leaf.Dead.Wt
          [Alley].SPRUM.Leaf.Carbon.Demands.Structural
          [Alley].SPRUM.Leaf.Carbon.Demands.Total
          [Alley].SPRUM.Leaf.Fn
          [Alley].SPRUM.Leaf.Canopy.Fw
          [Alley].SPRUM.Leaf.Canopy.LAI
          [Alley].SPRUM.Leaf.Live.Wt
          [Alley].SPRUM.Leaf.N
          [Alley].SPRUM.Leaf.Nitrogen.Demands.Total
          [Alley].SPRUM.Leaf.Canopy.PotentialEP
          [Alley].SPRUM.Leaf.Canopy.RadiationIntercepted
          [Alley].SPRUM.Leaf.Senesced.Weight.Structural
          [Alley].SPRUM.Leaf.SenescenceRate
          [Alley].SPRUM.Leaf.Canopy.Transpiration
          [Alley].SPRUM.Leaf.Canopy.WaterDemand
          [Alley].SPRUM.Leaf.Canopy.WaterAllocation
          [Alley].SPRUM.Leaf.Canopy.Width
          [Alley].SPRUM.Leaf.Wt
          [Alley].SPRUM.Phenology.Age.YearDecimal
          [Alley].SPRUM.Phenology.Age.Years
          [Alley].SPRUM.Phenology.CurrentStageName
          [Alley].SPRUM.Phenology.Stage
          [Alley].SPRUM.RelativeAnnualDimension
          [Alley].SPRUM.Root.Allocated.Carbon.Total
          [Alley].SPRUM.Root.Allocated.Nitrogen.Total
          [Alley].SPRUM.Root.Network.Depth
          [Alley].SPRUM.Root.Carbon.Demands.Structural
          [Alley].SPRUM.Root.Carbon.Demands.Total
          [Alley].SPRUM.Root.N
          [Alley].SPRUM.Root.Nitrogen.Demands.Total
          [Alley].SPRUM.RootUptakesArbitrator.WaterUptake.AmountByZone
          [Alley].SPRUM.RootUptakesArbitrator.WaterUptake.Mm
          [Alley].SPRUM.RootUptakesArbitrator.WaterUptake.Amount
          [Alley].SPRUM.RootUptakesArbitrator.NitrogenUptake.AmountByZone
          [Alley].SPRUM.RootUptakesArbitrator.NitrogenUptake.Gpm2
          [Alley].SPRUM.RootUptakesArbitrator.NitrogenUptake.Amount
          [Alley].SPRUM.RootUptakesArbitrator.WaterSupply.AmountByZone
          [Alley].SPRUM.RootUptakesArbitrator.WaterSupply.Mm
          [Alley].SPRUM.RootUptakesArbitrator.WaterSupply.Amount
          [Alley].SPRUM.RootUptakesArbitrator.NitrogenSupply.AmountByZone
          [Alley].SPRUM.RootUptakesArbitrator.NitrogenSupply.Gpm2
          [Alley].SPRUM.RootUptakesArbitrator.NitrogenSupply.Amount
          [Alley].SPRUM.Root.Wt
          [Alley].SPRUM.Residue.Allocated.Carbon.Total
          [Alley].SPRUM.Residue.Allocated.Nitrogen.Total
          [Alley].SPRUM.Residue.Carbon.Demands.Structural
          [Alley].SPRUM.Residue.Carbon.Demands.Total
          [Alley].SPRUM.Residue.N
          [Alley].SPRUM.Residue.Nitrogen.Demands.Total
          [Alley].SPRUM.Residue.Wt
          [Alley].SurfaceOrganicMatter.N
          [Alley].SurfaceOrganicMatter.Wt
          [Alley].Irrigation.IrrigationApplied
          [Alley].Fertiliser.NitrogenApplied
          sum([Alley].Soil.OutputLayers.SWmm)
          ([Alley].Soil.OutputLayers.SWmm[1] + [Alley].Soil.OutputLayers.SWmm[1] + [Alley].Soil.OutputLayers.SWmm[1]) as SWmm90
          [Alley].Soil.OutputLayers.SW
          [Alley].Soil.OutputLayers.SAT
          [Alley].Soil.OutputLayers.DUL
          [Alley].Soil.OutputLayers.LL15
          [Alley].Soil.SoilWater.Drainage
          [Alley].Soil.SoilWater.Evaporation
          [Alley].Soil.SoilWater.Eo
          [Weather].PanEvap
          [Weather].Radn
          [Weather].Rain
      Report AlleyZoneReport1 (disabled): EventNames=[Clock].EndOfDay
        VariableNames:
          [Clock].Today
          // [Alley].SPRUM.Harvesting.Amount as harvest
          // [Alley].Mow.Harvesting.Amount as cut
          [Alley].SPRUM.Leaf.Wt / 1000 as mass // kg standing biomass of understorey
      Report HarvestReport (disabled): EventNames=[Simplegrazing].Grazed
        VariableNames:
          [Clock].Today as Date
          ([AGPRyegrass].HarvestedWt + [AGPWhiteClover].HarvestedWt) as DayHarvDM // daily harvested DM (kgDM/ha)
          ([AGPWhiteClover].HarvestedWt*100/([AGPRyegrass].HarvestedWt + [AGPWhiteClover].HarvestedWt + 1)) as HarvCloverPc // harvested clover percent
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